// SBML level 2 version 3

model neg_feedback_2_spstochpn()

  // Compartments:
  compartment compartment = 1;

  // Species:
  substanceOnly species mRNA in compartment = 0;
  substanceOnly species lacI in compartment = 0;
  substanceOnly species Plac in compartment = 1;
  substanceOnly species Plac_lacI in compartment = 0;

  // Reactions:
  transcription: => mRNA; 0.5*Plac;  // modifiers: Plac
  decay_mRNA: mRNA => ; 0.0058*mRNA;
  translation: => lacI; 0.167*mRNA;  // modifiers: mRNA
  decay_lacI: lacI => ; 0.0012*lacI;
  regulation: Plac + lacI => Plac_lacI; 1*Plac*lacI*100;
  unbinds: Plac_lacI => Plac + lacI; 9*Plac_lacI/10;
  repressed_transcription: => mRNA; 5*10^(-4)*Plac_lacI;  // modifiers: Plac_lacI
end
