// SBML level 2 version 3

model nor_spstochpn()

  // Compartments:
  compartment compartment = 1;

  // Species:
  substanceOnly species PBAD_Tet in compartment = 0;
  substanceOnly species aTc in compartment = 0;
  substanceOnly species Ara in compartment = 0;
  substanceOnly species CI in compartment = 0;
  substanceOnly species mRNA_YFP in compartment = 0;
  substanceOnly species PYFP in compartment = 1;
  substanceOnly species YFP in compartment = 0;
  substanceOnly species mRNA_CI in compartment = 0;
  substanceOnly species PYFP_CI in compartment = 0;

  // Reactions:
  _trans_0: => PBAD_Tet; 1*aTc;  // modifiers: aTc
  _trans_1: => PBAD_Tet; 1*Ara;  // modifiers: Ara
  _trans_2: PBAD_Tet => mRNA_CI; 0.1*PBAD_Tet;
  _trans_3: => CI; 0.1*mRNA_CI;  // modifiers: mRNA_CI
  _trans_4: => mRNA_YFP; 0.1*PYFP;  // modifiers: PYFP
  _trans_5: => YFP; 0.1*mRNA_YFP;  // modifiers: mRNA_YFP
  decay_mRNA_CI: mRNA_CI => ; 0.001*mRNA_CI;
  decay_CI: CI => ; 0.001*CI;
  decay_YFP: YFP => ; 0.001*YFP;
  decay_mRNA_YFP: mRNA_YFP => ; 0.001*mRNA_YFP;
  _trans_10: PYFP => PYFP_CI; 1*PYFP*CI;  // modifiers: CI
  _trans_11: PYFP_CI => PYFP; 0.001*PYFP_CI;
  _trans_12: => Ara; 0.1;
  _trans_13: => aTc; 0.1;
end
