// SBML level 2 version 3

model main()

  // Compartments:
  compartment compartment = 1;

  // Species:
  substanceOnly species CI in compartment = 0;
  substanceOnly species CII in compartment = 0;
  substanceOnly species S_1 in compartment = 0;
  substanceOnly species S_2 in compartment = 0;
  substanceOnly species P_RE in compartment = 1;
  substanceOnly species P_R in compartment = 1;
  substanceOnly species RNAP in compartment = 30;
  substanceOnly species CI_2 in compartment = 0;
  substanceOnly species S_3 in compartment = 0;
  substanceOnly species S_4 in compartment = 0;

  // Reactions:
  decay_CI: CI => ; 0.0075*CI;
  decay_CII: CII => ; 0.0075*CII;
  tl_P_RE_CI: => 10 CI; 4e-5*S_1;  // modifiers: S_1
  tl_P_R_CII: => 10 CII; 0.014*S_2;  // modifiers: S_2
  Open_P_RE: RNAP + P_RE => S_1; 0.01*P_RE*RNAP;
  Open_P_R: RNAP + P_R => S_2; 0.69422*P_R*RNAP;
  Close_P_RE: S_1 => RNAP + P_RE; 1*S_1;
  Close_P_R: S_2 => P_R + RNAP; 1*S_2;
  Dimeriz_2: 2 CI => CI_2; 0.1*CI^2;
  Dimeriz: CI_2 => 2 CI; 1*CI_2;
  Rep_P_R: P_R + CI_2 => S_3; 0.2165*P_R*CI_2;
  S_3_unbind: S_3 => CI_2 + P_R; 1*S_3;
  Act_P_RE: P_RE + RNAP + CII => S_4; 0.00161*P_RE*CII*RNAP;
  tl_S_4_CI: => 10 CI; 0.015*S_4;  // modifiers: S_4
  S_4_unbind: S_4 => P_RE + RNAP + CII; 1*S_4;
end
