// SBML level 2 version 3

model main()

  // Compartments:
  compartment compartment = 1;

  // Species:
  substanceOnly species mRNA in compartment = 0;
  substanceOnly species GFP in compartment = 0;
  substanceOnly species Pro in compartment = 1;
  substanceOnly species Pro_TetR in compartment = 0;
  substanceOnly species TetR in compartment = 0;

  // Reactions:
  transcription: => mRNA; 0.5*Pro;  // modifiers: Pro
  decay_mRNA: mRNA => ; 0.0058*mRNA;
  translation: => GFP; 0.167*mRNA;  // modifiers: mRNA
  decay_GFP: GFP => ; 0.0012*GFP;
  regulation: Pro + TetR => Pro_TetR; 1*Pro*TetR*10000;
  unbinds: Pro_TetR => Pro + TetR; 9*Pro_TetR/1000000;
  repressed_transcription: => mRNA; 5*10^(-8)*Pro_TetR;  // modifiers: Pro_TetR
end
