// SBML level 2 version 3

model main()

  // Compartments:
  compartment compartment = 1;

  // Species:
  substanceOnly species mRNA in compartment = 0;
  substanceOnly species aTc in compartment = 0;
  substanceOnly species Pro in compartment = 1;
  substanceOnly species Pro_GFP in compartment = 0;
  substanceOnly species GFP in compartment = 0;
  substanceOnly species Pro_Ara in compartment = 0;
  substanceOnly species Ara in compartment = 0;

  // Reactions:
  transcription: => mRNA; 0.5*Pro;  // modifiers: Pro
  decay_mRNA: mRNA => ; 0.058*mRNA;
  translation: => aTc; 0.167*mRNA;  // modifiers: mRNA
  decay_aTc: aTc => ; 0.012*aTc;
  regulation: Pro + GFP => Pro_GFP; 1*Pro*GFP*10000;
  unbinds: Pro_GFP => Pro + GFP; 9*Pro_GFP/10000;
  repressed_transcription: => mRNA; 5*10^(-7)*Pro_GFP;  // modifiers: Pro_GFP
  ts_Ara: Pro_Ara => mRNA; 0.01*Pro_Ara;
  Ara_Pro: => Pro_Ara; 0.005*Ara;  // modifiers: Ara
end
