// SBML level 2 version 3

model main()

  // Compartments:
  compartment compartment = 1;

  // Species:
  substanceOnly species LacI in compartment = 0;
  substanceOnly species TetR in compartment = 0;
  substanceOnly species P in compartment = 1;
  substanceOnly species mRNA in compartment = 0;
  substanceOnly species GFP in compartment = 0;
  substanceOnly species LacI_Rep in compartment = 0;
  substanceOnly species TetR_Rep in compartment = 0;

  // Reactions:
  tc: => mRNA; 0.1*P;  // modifiers: P
  decay_mRNA: mRNA => ; 0.01*mRNA;
  tl: => GFP; 0.1*mRNA;  // modifiers: mRNA
  decay_GFP: GFP => ; 0.01*GFP;
  _trans_4: P + LacI => LacI_Rep; P*LacI*0.01;
  _trans_5: P + TetR => TetR_Rep; P*TetR*0.01;
  _trans_6: LacI_Rep => LacI + P; LacI_Rep*0.0001;
  _trans_7: TetR_Rep => TetR + P; TetR_Rep*0.0001;
end
