// SBML level 2 version 3

model main()

  // Compartments:
  compartment compartment = 1;

  // Species:
  substanceOnly species PBAD_Tet in compartment = 1;
  substanceOnly species aTc in compartment = 0;
  substanceOnly species Ara in compartment = 0;
  substanceOnly species CI in compartment = 0;
  substanceOnly species mRNA_CI in compartment = 0;
  substanceOnly species P_act in compartment = 0;

  // Reactions:
  tc_CI: => mRNA_CI; 0.3*P_act;  // modifiers: P_act
  tl_CI: => CI; 0.1*mRNA_CI;  // modifiers: mRNA_CI
  decay_mRNA_CI: mRNA_CI => ; 0.009*mRNA_CI;
  decay_CI: CI => ; 0.03*CI;
  _trans_4: PBAD_Tet + 100 aTc => P_act + 100 aTc; 0.01*aTc*PBAD_Tet;
  _trans_5: PBAD_Tet + 100 Ara => P_act + 100 Ara; 0.01*Ara*PBAD_Tet;
  _trans_6: P_act => PBAD_Tet; 0.0001*P_act;
end
