// SBML level 2 version 3

model main()

  // Compartments:
  compartment compartment = 1;

  // Species:
  substanceOnly species Pro in compartment = 0;
  substanceOnly species TetR in compartment = 0;
  substanceOnly species IPTG in compartment = 0;
  substanceOnly species Ara in compartment = 0;
  substanceOnly species mRNA_Ara in compartment = 0;

  // Reactions:
  IPTG_lacI_p: 100 TetR + 100 IPTG => Pro + 100 TetR + 100 IPTG; 0.0001*IPTG*TetR;
  tc_Ara: Pro => mRNA_Ara; 0.012*Pro;
  tl_Ara: => Ara; 0.009*mRNA_Ara;  // modifiers: mRNA_Ara
  decay_mRNA_Ara: mRNA_Ara => ; 0.01*mRNA_Ara;
  decay_Ara: Ara => ; 0.008*Ara;
end
