// SBML level 2 version 3

model main()

  // Compartments:
  compartment compartment = 1;

  // Species:
  substanceOnly species PBAD_Tet in compartment = 0;
  substanceOnly species aTc in compartment = 0;
  substanceOnly species Ara in compartment = 0;
  substanceOnly species CI in compartment = 0;
  substanceOnly species mRNA_CI in compartment = 0;

  // Reactions:
  aTc_p: => PBAD_Tet; 0.01*aTc;  // modifiers: aTc
  ara_p: => PBAD_Tet; 0.01*Ara;  // modifiers: Ara
  tc_CI: PBAD_Tet => mRNA_CI; 0.009*PBAD_Tet;
  tl_CI: => CI; 0.007*mRNA_CI;  // modifiers: mRNA_CI
  decay_mRNA_CI: mRNA_CI => ; 0.011*mRNA_CI;
  decay_CI: CI => ; 0.011*CI;
end
