// SBML level 2 version 3

model main()

  // Compartments:
  compartment compartment = 1;

  // Species:
  substanceOnly species PBAD_Tet in compartment = 0;
  substanceOnly species aTc in compartment = 0;
  substanceOnly species Ara in compartment = 0;
  substanceOnly species CI in compartment = 0;
  substanceOnly species mRNA_CI in compartment = 0;
  substanceOnly species P_YFP in compartment = 1;
  substanceOnly species mRNA_YFP in compartment = 0;
  substanceOnly species YFP in compartment = 0;
  substanceOnly species P_YFP_bound in compartment = 0;

  // Reactions:
  aTc_p: => PBAD_Tet; 0.01*aTc;  // modifiers: aTc
  ara_p: => PBAD_Tet; 0.01*Ara;  // modifiers: Ara
  tc_CI: PBAD_Tet => mRNA_CI; 0.04*PBAD_Tet;
  tl_CI: => CI; 0.02*mRNA_CI;  // modifiers: mRNA_CI
  decay_mRNA_CI: mRNA_CI => ; 0.02*mRNA_CI;
  decay_CI: CI => ; 0.02*CI;
  tc_YFP: => mRNA_YFP; 0.1*P_YFP;  // modifiers: P_YFP
  tl_YFP: => YFP; 0.1*mRNA_YFP;  // modifiers: mRNA_YFP
  decay_mRNA_YFP: mRNA_YFP => ; 0.01*mRNA_YFP;
  decay_YFP: YFP => ; 0.01*YFP;
  _trans_10: P_YFP_bound => P_YFP + CI; 0.0001*P_YFP_bound;
  bind_YFP_CI: P_YFP + CI => P_YFP_bound; 1*CI*P_YFP;
end
