// SBML level 2 version 3

model neg_feedback_2_spstochpn()

  // Compartments:
  compartment compartment = 1;

  // Species:
  substanceOnly species mRNA in compartment = 0;
  substanceOnly species lacI in compartment = 0;
  substanceOnly species Plac in compartment = 1;
  substanceOnly species Plac_lacI in compartment = 0;

  // Reactions:
  transcription: => mRNA; 0.1*Plac;  // modifiers: Plac
  decay_mRNA: mRNA => ; 0.001*mRNA;
  translation: => lacI; 0.1*mRNA;  // modifiers: mRNA
  decay_lacI: lacI => ; 0.001*lacI;
  regulation: Plac => Plac_lacI; 1*Plac*lacI;  // modifiers: lacI
  unbinds: Plac_lacI => Plac; 6e-5*Plac_lacI;
end
