// SBML level 2 version 1

model main()

  // Compartments:
  compartment c = 1.660539e-15;

  // Species:
  species s_id0 in c = 0; s_id0 is "mrna10";
  species s_id1 in c = 1.660539e-15/c; s_id1 is "g9";
  species s_id2 in c = 0; s_id2 is "araC";
  species s_id3 in c = 0; s_id3 is "g9-araC";
  species s_id4 in c = 0; s_id4 is "mrna32";
  species s_id5 in c = 1.660539e-15/c; s_id5 is "g31";
  species s_id6 in c = 0; s_id6 is "tetR";
  species s_id7 in c = 0; s_id7 is "g31-tetR";
  species s_id8 in c = 0; s_id8 is "mrna54";
  species s_id9 in c = 1.660539e-15/c; s_id9 is "g53";
  species s_id10 in c = 0; s_id10 is "clR";
  species s_id11 in c = 0; s_id11 is "g53-clR";

  // Reactions:
  r_id12: s_id0 => ; c*r_id12_k*s_id0;
    r_id12_k = 1 k_unit_1;
  r_id13: s_id1 => s_id1 + s_id0; c*r_id13_k*s_id1;
    r_id13_k = 10 k_unit_1;
  r_id14: s_id1 + s_id2 => s_id3; c*r_id14_k*s_id1*s_id2;
    r_id14_k = 100 k_unit_2;
  r_id15: s_id3 => s_id1 + s_id2; c*r_id15_k*s_id3;
    r_id15_k = 10 k_unit_1;
  r_id16: s_id3 => s_id3 + s_id0; c*r_id16_k*s_id3;
    r_id16_k = 10 k_unit_1;
  r_id17: s_id4 => ; c*r_id17_k*s_id4;
    r_id17_k = 1 k_unit_1;
  r_id18: s_id5 => s_id5 + s_id4; c*r_id18_k*s_id5;
    r_id18_k = 90 k_unit_1;
  r_id19: s_id5 + s_id6 => s_id7; c*r_id19_k*s_id5*s_id6;
    r_id19_k = 100 k_unit_2;
  r_id20: s_id7 => s_id5 + s_id6; c*r_id20_k*s_id7;
    r_id20_k = 50 k_unit_1;
  r_id21: s_id7 => s_id7 + s_id4; c*r_id21_k*s_id7;
    r_id21_k = 50 k_unit_1;
  r_id22: s_id8 => ; c*r_id22_k*s_id8;
    r_id22_k = 1 k_unit_1;
  r_id23: s_id9 => s_id9 + s_id8; c*r_id23_k*s_id9;
    r_id23_k = 120 k_unit_1;
  r_id24: s_id9 + s_id10 => s_id11; c*r_id24_k*s_id9*s_id10;
    r_id24_k = 100 k_unit_2;
  r_id25: s_id11 => s_id9 + s_id10; c*r_id25_k*s_id11;
    r_id25_k = 50 k_unit_1;
  r_id26: s_id11 => s_id11 + s_id8; c*r_id26_k*s_id11;
    r_id26_k = 50 k_unit_1;
  r_id27: s_id8 => s_id8 + s_id2; c*r_id27_k*s_id8;
    r_id27_k = 10 k_unit_1;
  r_id28: s_id4 => s_id4 + s_id10; c*r_id28_k*s_id4;
    r_id28_k = 10 k_unit_1;
  r_id29: s_id0 => s_id0 + s_id6; c*r_id29_k*s_id0;
    r_id29_k = 10 k_unit_1;
  r_id30: s_id2 => ; c*r_id30_k*s_id2;
    r_id30_k = 10 k_unit_1;
  r_id31: s_id10 => ; c*r_id31_k*s_id10;
    r_id31_k = 10 k_unit_1;
  r_id32: s_id6 => ; c*r_id32_k*s_id6;
    r_id32_k = 10 k_unit_1;

  // Unit definitions:
  unit time = second;
  unit substance = 1e-9 mole;
  unit k_unit_1 = 1 / second;
  unit k_unit_2 = litre / (second * 1e-9 mole);
end
