// SBML level 2 version 3

model main()

  // Compartments:
  compartment compartment = 1;

  // Species:
  substanceOnly species mRNA in compartment = 0;
  substanceOnly species lacI in compartment = 0;
  substanceOnly species Plac in compartment = 1;
  substanceOnly species Plac_lacI in compartment = 0;

  // Reactions:
  transcription: Plac => mRNA + Plac; 10;
  decay_mRNA: mRNA => ; exp(0.54*mRNA);
  translation: mRNA => lacI + mRNA; 90*mRNA;
  decay_lacI: lacI => ; 1080/(0.1 + 4*lacI);
  regulation: Plac + lacI => Plac_lacI + lacI; 3*1.8*((0.2 - 0.01)*(1/(1 + (2/0.0035)^2)) + 0.01)*Plac*lacI;
  unbinds: Plac_lacI => Plac; 0.006*Plac_lacI;
end
