// SBML level 2 version 3

model main()

  // Compartments:
  compartment compartment = 1;

  // Species:
  substanceOnly species mRNA in compartment = 0;
  substanceOnly species lacI in compartment = 0;
  substanceOnly species Plac in compartment = 100;
  substanceOnly species Plac_lacI in compartment = 0;

  // Reactions:
  transcription: Plac => mRNA + Plac; 0.1*Plac;
  decay_mRNA: mRNA => ; 0.001*mRNA;
  translation: mRNA => lacI + mRNA; 0.1*mRNA;
  decay_lacI: lacI => ; 0.001*lacI;
  regulation: Plac + lacI => Plac_lacI + lacI; 1*Plac*lacI;
  unbinds: Plac_lacI => Plac; 6e-5*Plac_lacI;
end
